# Задание 1
a := 3.5344
Δa := 0.00005
δa := Δa/|a| = 1.41467e-5
# Задание 2
a2 := 0.0002545
a2o := 0.000254
Δa2 := 0.000001
Δ := |a2 - a2o| = 5e-7
Δa2o := Δa2 + Δ = 1.5e-6
δa2o := Δa2o/|a2o| = 0.00590551
# Задание 3
Pi := 3.14
Δpi := 0.0016
d := 2.5
Δd := 0.05
V(Pi, d) := (Pi*d^3)/6
V(Pi, d) = 8.17708
ΔV := |d/dPi(V(Pi, d))|*Δpi + |d/dd(V(Pi, d))|*Δd
ΔV = 0.494792
δV := ΔV/V(Pi, d)
δV = 0.0605096
# Задание 4
a4 := 0.4678
b4 := 1.2456
Δa4 := 0.00001
Δb4 := 0.00001
Сложение
Δa4 + Δb4 = 2e-5
Вычитание
Δa4 + Δb4 = 2e-5
Умножение
|a4|*Δb4 + |b4|*Δa4 = 1.7134e-5
Деление
(|a4|*Δb4 + |b4|*Δa4)/b4^2 = 1.10434e-5
# Возведение в 4 степень
4*a4^(4 - 1)*Δa4 = 4.09487e-6
