# Линейная интерполяция
t := [700; 900; 1100]
P := [11; 23; 47]
c := 1000
linterp(t, P, c) = 35
# Полином лагранжа
t := [700; 900; 1100]
P := [11; 23; 47]
c := 1000
L(a, i1, i2, i3) := P[i1]*(a - t[i2])*(a - t[i3])/((t[i1] - t[i2])*(t[i1] - t[i3])) + P[i2]*(a - t[i1])*(a - t[i3])/((t[i2] - t[i1])*(t[i2] - t[i3])) + P[i3]*(a - t[i1])*(a - t[i2])/((t[i3] - t[i1])*(t[i3] - t[i2]))
L(c, 0, 1, 2) = 33.5
# Полином Ньютона
R1(i1, i2) := (P[i1] - P[i2])/(t[i1] - t[i2])
R2(i1, i2, i3) := (R1(i1, i2) - R1(i1, i3))/(t[i2] - t[i3])
N(a, i1, i2, i3) := P[i1] + (a - t[i1])*R1(i1, i2) + (a - t[i1])*(a - t[i2])*R2(i1, i2, i3)
N(c, 0, 1, 2) = 33.5
# Канонический полином
A := [1, 700, 700^2; 1, 900, 900^2; 1, 1100, 1100^2]
T := A^-1*P
T = [63.5; -0.18; 0.00015]
f(c) := T[0] + T[1]*c + T[2]*c^2
c := 1000
f(c) = 33.5
Сплайн - интерполяция
Origin := 0
t := [700; 900; 1100]
P := [11; 23; 47]
i := 0 .. 1
h[i] := t[i + 1]*(-t[i])
h = [-630000; -990000]
B := [0; 0]
C := [0; 0]
D := [0; 0]
Given
B[0]*h[0] + C[0]*h[0]^2 + D[0]*h[0]^3 == P[1] - P[0]
B[1]*h[1] + C[1]*h[1]^2 + D[1]*h[1]^3 == P[2] - P[1]
B[1] - B[0] - 2*C[0]*h[0] - 3*D[0]*h[0]^2 == 0
C[1] - C[0] - 3*D[0]*h[0] == 0
C[1] + 3*D[1]*h[1] == 0
C[0] == 0
[B; C; D] := Find(B, C, D)
B = [-1.80375e-5; -2.10678e-5]
C = [0; 4.81e-12]
D = [-2.54498e-18; 1.61953e-18]
i := 0 .. 1
S := P[i] + B[1]*(t - t[1]) + C[1]*(t - t[1])^2 + D[1]*(t - t[1])^3  # error: This value must be an integer.
d := cspline(t, P)
interp(d, t, P, c) = 34.25
