# Аппроксимация линейной функцией
x := [2; 3; 4; 5; 6]
y := [0.4; 0.55; 0.13; 0.09; 0.07]
N := length(x) - 1
N = 4
i := 0 .. N
a := slope(x, y)
a = -0.112
b := intercept(x, y)
b = 0.696
yLinear := a*x + b
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yLinear = [0.472; 0.36; 0.248; 0.136; 0.024]
sum((y - yLinear)^2) = 0.05944
# Аппроксимация степенной функцией
x := [2; 3; 4; 5; 6]
y := [0.4; 0.55; 0.13; 0.09; 0.07]
N := length(x) - 1
N = 4
i := 0 .. N
k := exp(intercept(vectorize(ln(x)), vectorize(ln(y))))
m := slope(vectorize(ln(x)), vectorize(ln(y)))
k = 2.11924
m = -1.88119
yS(x) := k*x^m
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yS(x) = [0.575287; 0.268301; 0.156167; 0.102632; 0.0728328]
sum((y - yS(x))^2) = 0.110932
# Аппроксимация показательной функцией
x := [2; 3; 4; 5; 6]
y := [0.4; 0.55; 0.13; 0.09; 0.07]
N := length(x) - 1
N = 4
i := 0 .. N
m := slope(x, vectorize(ln(y)))
m = -0.529605
k := exp(intercept(x, vectorize(ln(y))))
k = 1.48306
yP(x) := k*exp(m*x)
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yP(x) = [0.514221; 0.302793; 0.178296; 0.104987; 0.0618205]
sum((y - yP(x))^2) = 0.0767819
# Аппроксимация логарифмической функцией
x := [2; 3; 4; 5; 6]
y := [0.4; 0.55; 0.13; 0.09; 0.07]
N := length(x) - 1
N = 4
i := 0 .. N
k := slope(vectorize(ln(x)), y)
k = -0.398178
m := intercept(vectorize(ln(x)), y)
m = 0.771943
yL(x) := k*ln(x) + m
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yL(x) = [0.495947; 0.334499; 0.219951; 0.1311; 0.0585033]
sum((y - yL(x))^2) = 0.0655588
# Аппроксимация гиперболической функцией
x := [2; 3; 4; 5; 6]
y := [0.4; 0.55; 0.13; 0.09; 0.07]
N := length(x) - 1
N = 4
i := 0 .. N
k := slope(1/x, y)
k = 1.21176
m := intercept(1/x, y)
m = -0.103409
yH(x) := if(x == 0, "error", k/x + m)
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yH(x) = [0.502469; 0.300509; 0.19953; 0.138942; 0.0985502]
sum((y - yH(x))^2) = 0.0807902
# Аппроксимация квадратической функцией
x := [2; 3; 4; 5; 6]
y := [0.4; 0.55; 0.13; 0.09; 0.07]
N := length(x) - 1
N = 4
i := 0 .. N
yK(x) := [1; x; x^2]
a := linfit(x, y, yK)
yU(x) := a[2]*x^2 + a[1]*x + a[0]
a = [0.736; -0.134857; 0.00285714]
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yU(x) = [0.477714; 0.357143; 0.242286; 0.133143; 0.0297143]
sum((y - yU(x))^2) = 0.0593257
