# Метод прямоугольников
rectangle(a, b, n, f) :=
    h ← (b - a)/n
    S ← 0
    for j ∈ 1 .. n
        x[j - 1] ← a + h*(j - 1)
        S ← S + f(x[j - 1])
    S ← S*h
    S
7
f(x) := ln(x + 2)
rectangle(0, e^1, 100, f) = 3.20389
rectangle1(a, b, n, f) :=
    h ← (b - a)/n
    S ← 0
    for j ∈ 1 .. n
        x[j] ← a + h*j
        S ← S + f(x[j])
    S ← S*h
    S
rectangle1(0, e^1, 100, f) = 3.22722
rectangle2(a, b, n, f) :=
    h ← (b - a)/n
    S ← 0
    for j ∈ 1 .. n
        x[j] ← a + h*j
        S ← S + f(x[j] - h/2)
    S ← S*h
    S
rectangle2(0, e^1, 100, f) = 3.21559
# Метод трапеций
trap(a, b, n, f) :=
    h ← (b - a)/n
    S ← 0
    for j ∈ 1 .. (n - 1)
        x[j] ← a + h*j
        S ← S + f(x[j])
    S ← (S + (f(a) + f(b))/2)*h
    S
trap(0, e^1, 100, f) = 3.21556
# Метод Симпсона
simpson(a, b, n, f) :=
    h ← (b - a)/n
    S1 ← 0
    for j ∈ 1 .. (n/2)
        x[2*j - 1] ← a + h*(2*j - 1)
        S1 ← S1 + f(x[2*j - 1])
    S2 ← 0
    for k ∈ 1 .. (n/2 - 1)
        x[2*k] ← a + h*2*k
        S2 ← S2 + f(x[2*k])
    S ← (4*S1 + 2*S2 + (f(a) + f(b)))*h/3
    S
simpson(0, e^1, 100, f) = 3.21558
# Метод Монте-Карло
t := 0 .. e^1
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b := f(e^1)
a := e^1
N := 200
i := 1 .. N
x[i] := rnd(a)
y[i] := rnd(b)
m[i] :=
    1 if y[i] < f(x[i])
    0 otherwise
M := sum(m[i], i)
M = 151
S := M*a*b/N
S = 3.18403
