# Метод polyroots
x^3 - 2*x^2 - 4*x + 5 = 0  # error: This variable is undefined.
v := [5; -4; -2; 1]
polyroots(v) = [-1.79129; 1; 2.79129]
F(x) := sum(v[i]*x^i, i = 0 .. 3)
v[0] + v[1]*x + v[2]*x^2 + v[3]*x^3
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# Метод дихотомии
f(x) := x^3 - 2*x^2 - 4*x + 5
dihot(a, b, e) :=
    k ← 0
    while 1
        c ← (a + b)/2
        b ← c if f(c)*f(a) < 0
        a ← c otherwise
        k ← k + 1
        break if |a - b| < e
    [c; k]
dihot(2, 3, 0.001) = [2.79199; 10]
# Метод хорд
f(x) := x^3 - 2*x^2 - 4*x + 5
horda(a, b, e) :=
    k ← 0
    while 1
        c ← a - f(a)*(b - a)/(f(b) - f(a))
        b ← c if f(c)*f(a) < 0
        a ← c otherwise
        k ← k + 1
        break if |f(c)| < e
    [c; k]
horda(2, 3, 0.001) = [2.7912; 5]
