# Метод Гаусса
A := [2, 0, -1; 1, -3, 1; 1, 1, 3]
b := [1; 2; 4]
P := augment(A, b)
R := rref(P)
R = [1, 0, 0, 1; 0, 1, 0, 0; 0, 0, 1, 1]
n := cols(R)
x := R[:, n - 1]
x = [1; 0; 1]
# Метод простой итерации
М_пр_итер :=
    A ← [2, 0, -1; 1, -3, 1; 1, 1, 3]
    B ← [1; 2; 4]
    e ← 0.0001
    s0 ← |A[0, 0]| > |A[0, 1]| + |A[0, 2]|
    s1 ← |A[1, 1]| > |A[1, 0]| + |A[1, 2]|
    s2 ← |A[2, 2]| > |A[2, 0]| + |A[2, 1]|
    if s0 and s1 and s2
        T ← ["усл сх", "вып"]
        x ← [0; 0; 0]
        xx ← x
        k ← 0
        while 1
            x[0] ← (B[0] - A[0, 1]*xx[1] - A[0, 2]*xx[2])/A[0, 0]
            x[1] ← (B[1] - A[1, 0]*xx[0] - A[1, 2]*xx[2])/A[1, 1]
            x[2] ← (B[2] - A[2, 0]*xx[0] - A[2, 1]*xx[1])/A[2, 2]
            k ← k + 1
            s0 ← |x[0] - xx[0]| < e
            s1 ← |x[1] - xx[1]| < e
            s2 ← |x[2] - xx[2]| < e
            break if s0 and s1 and s2
            xx ← x
        T ← stack(T, ["x1=", x[0]; "x2=", x[1]; "x3=", x[2]; "k=", k])
    T ← ["Усл сх", "не вып"] otherwise
    T
М_пр_итер = ["усл сх", "вып"; "x1=", 1.00002; "x2=", 4.63506e-5; "x3=", 0.999946; "k=", 17]
