t := 0.05
F(x) := [sin(x[0] + 0.4) + 3.5*x[1] - 1.5; cos(x[1] + 0.2) + 0.5*x[0]]
N := 10
k := 0 .. N
x[:, 0] := [1; 0]
x[:, k + 1] := t*F(x[:, k])
Δx[k] := |x[:, k + 1] - x[:, k]|
x[:, 1] = [-0.0257275; 0.0740033]
F(x[:, 1]) = [-0.875393; 0.949832]
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x[:, 2] = [-0.0437696; 0.0474916]
F(x[:, 2]) = [-0.985036; 0.947645]
x[:, 3] = [-0.0492518; 0.0473823]
F(x[:, 3]) = [-0.990562; 0.944931]
x[:, 4] = [-0.0495281; 0.0472465]
F(x[:, 4]) = [-0.991296; 0.944826]
x[:, 5] = [-0.0495648; 0.0472413]
F(x[:, 5]) = [-0.991349; 0.944809]
x[:, 6] = [-0.0495674; 0.0472404]
F(x[:, 6]) = [-0.991354; 0.944808]
F(x[:, 7]) = [-0.991355; 0.944808]
x[:, 7] = [-0.0495677; 0.0472404]
F(x[:, 8]) = [-0.991355; 0.944808]
x[:, 8] = [-0.0495677; 0.0472404]
F(x[:, 9]) = [-0.991355; 0.944808]
x[:, 9] = [-0.0495677; 0.0472404]
x[:, N + 1] = [-0.0495677; 0.0472404]
F(x[:, N + 1]) = [-0.991355; 0.944808]
